// SBML level 2 version 3

model vol_example.mdlr()

  // Compartments:
  compartment EC = 1;
  compartment PM in EC = 1;  // 2-D
  compartment CP in PM = 1;

  // Species:
  species EC_Lig_l_l in EC = 6000; EC_Lig_l_l is "@EC::Lig(l,l)";
  species PM_Rec_a in PM = 6000; PM_Rec_a is "@PM::Rec(a)";
  species PM_Lig_l_1_l_EC_Rec_a_1 in PM = 0; PM_Lig_l_1_l_EC_Rec_a_1 is "@PM::Lig(l!1,l)@EC.Rec(a!1)";
  species S4 in PM = 0; S4 is "@PM::Lig(l!1,l!2)@EC.Rec(a!2).Rec(a!1)";

  // Parameters:
  ITERATIONS = 100000;
  TIME_STEP = 5e-6;
  VACANCY_SEARCH_DISTANCE = 100;
  Nav = 6.022e8;
  rxn_layer_t = 0.01;
  vol_wall = 56.569505;
  vol_EC = 39;
  vol_PM = 4.8366246;
  vol_CP = 1;
  NaV = 6.022e8;
  Lig_tot = 6000;
  Rec_tot = 400;
  kp1 = 100;
  km1 = 0.01;
  kp2 = 100;
  km2 = 0.01;
  T = 298.15;
  Rs = 0.002564;
  Rc = 0.0015;
  gamma = 0.5722;
  KB = 1.3806488e-19;
  mu_wall = 1e-9;
  mu_EC = 1e-9;
  mu_PM = 1e-9;
  mu_CP = 1e-9;
  h = rxn_layer_t;

  // Assignment rules:
  RecFree := 0 + PM_Rec_a;
  LigFree := 0 + 0;
  RecBound := PM_Lig_l_1_l_EC_Rec_a_1 + S4;
  Dimers := 0 + S4;

  // Reactions:
  R1: EC_Lig_l_l + PM_Rec_a => PM_Lig_l_1_l_EC_Rec_a_1; 2*kp1*EC_Lig_l_l*PM_Rec_a;
  R2: PM_Lig_l_1_l_EC_Rec_a_1 => EC_Lig_l_l + PM_Rec_a; km1*PM_Lig_l_1_l_EC_Rec_a_1;
  R3: PM_Rec_a + PM_Lig_l_1_l_EC_Rec_a_1 => S4; kp2*PM_Rec_a*PM_Lig_l_1_l_EC_Rec_a_1;
  R4: S4 => PM_Rec_a + PM_Lig_l_1_l_EC_Rec_a_1; 2*km2*S4;
end
